// COMSOL Multiphysics 5.6.0.401 model "halbach.mph"
// Outline of the model tree

Selections
  sel1: Explicit "Magnets" on domains 2-5
  sel2: Explicit "M1" on domains 2
  sel3: Explicit "M2" on domains 3
  sel4: Explicit "M3" on domains 4
  sel5: Explicit "M4" on domains 5

Geometry
  geom1 "Geometry 1" (3D, length unit mm)
    blk1: Block | size = {300, 100, 200}
    blk2: Block | pos = {90, 37.5, 75}; size = {30, 25, 50}
    blk3: Block | pos = {120, 37.5, 75}; size = {30, 25, 50}
    blk4: Block | pos = {150, 37.5, 75}; size = {30, 25, 50}
    blk5: Block | pos = {180, 37.5, 75}; size = {30, 25, 50}
    fin: Finalize "Form Union"

Materials
  mat1: Common "Air" on all domains
    def "Basic"
      thermalexpansioncoefficient = alpha_p(pA,T)
      molarmass = 0.02897[kg/mol]
      bulkviscosity = muB(T)
      relpermeability = 1
      relpermittivity = 1
      dynamicviscosity = eta(T)
      ratioofspecificheat = 1.4
      electricconductivity = 0[S/m]
      heatcapacity = Cp(T)
      density = rho(pA,T)
      thermalconductivity = k(T)
      soundspeed = cs(T)
      eta: Piecewise | arg = T; pieces = {200.0, 1600.0, -8.38278E-7+8.35717342E-8*T^1-7.69429583E-11*T^2+4.6437266E-14*T^3-1.06585607E-17*T^4}; argunit = K; fununit = Pa*s
      Cp: Piecewise | arg = T; pieces = {200.0, 1600.0, 1047.63657-0.372589265*T^1+9.45304214E-4*T^2-6.02409443E-7*T^3+1.2858961E-10*T^4}; argunit = K; fununit = J/(kg*K)
      rho: Analytic | expr = pA*0.02897/R_const[K*mol/J]/T; args = {pA, T}; argunit = Pa,K; fununit = kg/m^3
      k: Piecewise | arg = T; pieces = {200.0, 1600.0, -0.00227583562+1.15480022E-4*T^1-7.90252856E-8*T^2+4.11702505E-11*T^3-7.43864331E-15*T^4}; argunit = K; fununit = W/(m*K)
      cs: Analytic | expr = sqrt(1.4*R_const[K*mol/J]/0.02897*T); args = T; argunit = K; fununit = m/s
      an1: Analytic | funcname = alpha_p; expr = -1/rho(pA,T)*d(rho(pA,T),T); args = {pA, T}; argunit = Pa,K; fununit = 1/K
      an2: Analytic "Analytic 2a" | funcname = muB; expr = 0.6*eta(T); args = T; argunit = K; fununit = Pa*s
    RefractiveIndex
      n = 1
      ki = 0
    NonlinearModel
      BA = (def.gamma+1)/2
    idealGas
      Rs = R_const/Mn
      heatcapacity = Cp(T)
      ratioofspecificheat = 1.4
      molarmass = 0.02897
      Cp: Piecewise | arg = T; pieces = {200.0, 1600.0, 1047.63657-0.372589265*T^1+9.45304214E-4*T^2-6.02409443E-7*T^3+1.2858961E-10*T^4}; argunit = K; fununit = J/(kg*K)
  mat2: Common "N52 (Sintered NdFeB)" on selection sel1
    def "Basic"
      electricconductivity = 1/1.4[uohm*m]
      relpermittivity = 1
    RemanentFluxDensity
      murec = 1.05
      normBr = 1.44[T]

Physics
  mfnc: MagnetostaticsNoCurrents "Magnetic Fields, No Currents" on all domains
    dependent variable Vm
    mfc1: MagneticFluxConservation (default)
    mi1: MagneticInsulation (default)
    init1: init "Initial Values 1" (default)
    mfc2: MagneticFluxConservation on selection sel2
      ConstitutiveRelationBH = RemanentFluxDensity
      e_crel_BH_RemanentFluxDensity = {0, 1, 0}
    mfc3: MagneticFluxConservation on selection sel3
      ConstitutiveRelationBH = RemanentFluxDensity
      e_crel_BH_RemanentFluxDensity = {1, 0, 0}
    mfc4: MagneticFluxConservation on selection sel4
      ConstitutiveRelationBH = RemanentFluxDensity
      e_crel_BH_RemanentFluxDensity = {0, -1, 0}
    mfc5: MagneticFluxConservation on selection sel5
      ConstitutiveRelationBH = RemanentFluxDensity
      e_crel_BH_RemanentFluxDensity = {-1, 0, 0}

Mesh
  mesh1 "Mesh 1"
    size: MeshSizeDefault | hmax = 30; hmin = 5.4; hcurve = 0.6; hnarrow = 0.5; hgrad = 1.5
    ftet1: FreeTet "Free Tetrahedral 1" on domains 1-5

Studies
  std1 "Study 1"
    stat: Stationary

Solver configurations
  sol1 "Solution 1" (study std1)
    v1: Variables "Dependent Variables 1"
    s1: Stationary "Stationary Solver 1"
      fc1: FullyCoupled | linsolver = i1
      i1: Iterative | linsolver = cg
        mg1: Multigrid | prefun = amg

Datasets
  dset1: Solution | solution = sol1
  cpl1: CutPlane | data = dset1; quickplane = xy; quickz = mfnc.CPz
  cpl2: CutPlane | data = dset1; quickx = mfnc.CPx
  cpl3: CutPlane | data = dset1; quickplane = zx; quicky = mfnc.CPy

Plots
  pg1: PlotGroup3D "Magnetic Flux Density Norm (mfnc)" | data = dset1
    mslc1: Multislice
      expr = mfnc.normB
      xnumber = 0
      xcoord = mfnc.CPx
      ynumber = 0
      ycoord = mfnc.CPy
      zcoord = mfnc.CPz
      tran1: Transparency | transparency = 0.1
    str1: StreamlineSurface
      data = cpl1
      expr = {mfnc.Bx, mfnc.By, 0}
      udist = 0.03
      pointtype = arrow
      arrowlength = logarithmic
      col1: Color "Color Expression 1"
        expr = log10(mfnc.normB*(sqrt(real(mfnc.Bx)^2+real(mfnc.By)^2)>0.1*abs(real(mfnc.Bz))))
      filt1: Filter | expr = !isScalingSystemDomain
    str2: StreamlineSurface
      data = cpl2
      expr = {0, mfnc.By, mfnc.Bz}
      udist = 0.03
      pointtype = arrow
      arrowlength = logarithmic
      col1: Color "Color Expression 1"
        expr = log10(mfnc.normB*(sqrt(real(mfnc.By)^2+real(mfnc.Bz)^2)>0.1*abs(real(mfnc.Bx))))
      filt1: Filter | expr = !isScalingSystemDomain
    str3: StreamlineSurface
      data = cpl3
      expr = {mfnc.Bx, 0, mfnc.Bz}
      udist = 0.03
      pointtype = arrow
      arrowlength = logarithmic
      col1: Color "Color Expression 1"
        expr = log10(mfnc.normB*(sqrt(real(mfnc.Bx)^2+real(mfnc.Bz)^2)>0.1*abs(real(mfnc.By))))
      filt1: Filter | expr = !isScalingSystemDomain
    arwv1: ArrowVolume | expr = {mfnc.Bx, mfnc.By, mfnc.Bz}; xnumber = 21; arrowlength = logarithmic