// COMSOL Multiphysics 6.1.0.282 model "magnet.mph"
// Outline of the model tree

Geometry
  geom1 "Geometry 1" (3D, length unit mm)
    blk1: Block | base = center; size = {10, 10, 10}
    sph1: Sphere | r = 50
    fin: Finalize "Form Union"

Materials
  mat1: Common "Material 1" on all domains
    def "Basic"
      relpermeability = 1

Physics
  mfnc: MagnetostaticsNoCurrents "Magnetic Fields, No Currents" on all domains
    dependent variable Vm
    mfc1: MagneticFluxConservation (default)
    mi1: MagneticInsulation (default)
    init1: init "Initial Values 1" (default)
    mfc2: MagneticFluxConservation "Magnet" on domains 2 | ConstitutiveRelationBH = Magnetization; M = {860000, 0, 0}

Mesh
  mesh1 "Mesh 1" (physics-controlled)

Studies
  std1 "Study 1"
    stat: Stationary

Solver configurations
  sol1 "Solution 1" (study std1)
    v1: Variables "Dependent Variables 1"
    s1: Stationary "Stationary Solver 1"
      fc1: FullyCoupled | linsolver = i1
      i1: Iterative | prefuntype = right; nlinnormuse = on
        mg1: Multigrid

Datasets
  dset1: Solution | solution = sol1

Plots
  pg1: PlotGroup3D "Magnetic Flux Density Norm (mfnc)" | data = dset1
    mslc1: Multislice | expr = mfnc.normB; xnumber = 0; xcoord = mfnc.CPx; ycoord = 0; zcoord = 0
    strmsl1: StreamlineMultislice
      expr = {mfnc.Bx, mfnc.By, mfnc.Bz}
      xcoord = mfnc.CPx
      ycoord = 0
      zcoord = 0
      udist = 0.02
      col1: Color "Color Expression 1" | expr = mfnc.normB
      filt1: Filter | expr = !isScalingSystemDomain
    arwv1: ArrowVolume | expr = {mfnc.Bx, mfnc.By, mfnc.Bz}; xnumber = 100; ynumber = 100; znumber = 100
  pg2: PlotGroup3D "Magnetic Scalar Potential (mfnc)" | data = dset1
    mslc1: Multislice
      expr = Vm
      multiplanexmethod = coord
      xcoord = mfnc.CPx
      multiplaneymethod = coord
      ycoord = mfnc.CPy
      multiplanezmethod = coord
      zcoord = mfnc.CPz
    strmsl1: StreamlineMultislice
      expr = {mfnc.Hx, mfnc.Hy, mfnc.Hz}
      multiplanexmethod = coord
      xcoord = mfnc.CPx
      multiplaneymethod = coord
      ycoord = mfnc.CPy
      multiplanezmethod = coord
      zcoord = mfnc.CPz
      udist = 0.02
      col1: Color "Color Expression 1" | expr = Vm
      filt1: Filter | expr = !isScalingSystemDomain